*Heading
** Generated by:
**
** PARTS
**
*Part, name=Car_front
*Node
1,   4.302431e+01,   3.355110e+02,   -2.551240e+02
2,   4.329460e+01,   3.522342e+02,   -2.535685e+02
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*Element, type=C3D8R
1, 1, 2, 3, 4, 5, 6, 7, 8
2, 2, 9, 10, 3, 6, 11, 12, 7
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*Nset, nset=Set-1, generate
   1,  21546,    1
*Elset, elset=Set-1, generate
   1,  10592,    1
** Section: Section-1
*Solid Section, elset=Set-1, controls=EC-1, material=aluminum
*End Part
**
*Part, name=wall
*Node
1, -1.000000e+03, -7.500000e+02, 0.000000e+00
2, -1.000000e+03, -7.500000e+02, 1.000000e+02
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*Element, type=C3D8R
1, 1, 33, 35, 3, 2, 34, 36, 4
2, 3, 35, 37, 5, 4, 36, 38, 6
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*Nset, nset=Set-1, generate
   1,  672,    1
*Elset, elset=Set-1, generate
   1,  300,    1
** Section:
*Solid Section, elset=Set-1, controls=EC-1, material=steel
,
*End Part
**
** ASSEMBLY
**
*Assembly, name=Assembly
**
*Instance, name=Car_front-1, part=Car_front
*End Instance
*Instance, name=wall-1, part=wall
       900.0,    750.0,       0.0
*End Instance
**
*Nset, nset=Set-3, instance=wall-1
1, 2, 33, 34, 65, 66
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**
*End Assembly
**
** MATERIALS
**
*Material, name=aluminum
*Density
 2.5e-09,
*Elastic
70000., 0.3
*Plastic
250, 0.0
300, 0.1
*Material, name=steel
*Density
 7.8e-09,
*Elastic
210000., 0.3
**
** BOUNDARY CONDITIONS
**
** Name: BC-1 Type: Symmetry/Antisymmetry/Encastre
*Boundary
Set-3, ENCASTRE
**
** PREDEFINED FIELDS
**
** Name: Predefined Field-1   Type: Velocity
*Initial Conditions, type=VELOCITY
Car_front-1.Set-1, 3, 1.4e4
**
** INTERACTIONS
**
** Interaction: Int-1
*Contact, op=NEW
*Contact Inclusions, ALL EXTERIOR, HAKAIoption=self-contact
**  , HAKAIoption=self-contact
*Contact Property Assignment
 ,  , IntProp-1
** ----------------------------------------------------------------
**
** STEP: Step-1
**
*Step, name=Step-1, nlgeom=YES
*Dynamic, Explicit
1.0e-07, 0.2
*Bulk Viscosity
0.06, 1.2
** Mass Scaling: Semi-Automatic
**               Whole Model
*Fixed Mass Scaling, factor=60.
**
** OUTPUT REQUESTS
**
*Restart, write, number interval=1, time marks=NO
**
** FIELD OUTPUT: F-Output-1
**
*Output, field, variable=PRESELECT
**
** HISTORY OUTPUT: H-Output-1
**
*Output, history, variable=PRESELECT
*End Step
